# == SETUP ==
log             log.lammps.run append
timer           timeout 86300
atom_style      atomic
units           metal
boundary        p p f
newton          on
atom_modify map yes

# == VARIABLES ==
variable    temp equal 350
variable    seed equal 111
variable    nsteps equal 2000
variable    tstep equal 0.0005
variable    wall equal 20.5

# == DATA ==
read_data   franken/tests/lammps/PtH2O.lammpsdata

group       fixed id 37 38 39 40 41 42 43 44 45 46 47 48
group       free subtract all fixed

# == INTERACTIONS ==
pair_style      metatomic franken/tests/lammps/run_260312_093017_b4e1eaa9/best_ckpt-metatomic.pt device cuda
pair_coeff      * * Pt O H
timestep        ${tstep}

# == MINIMIZATION ==
fix fix_min fixed setforce 0.0 0.0 0.0
minimize        0 0.0001 1000 10000
unfix fix_min

# == OUTPUT ==
thermo          100
thermo_style    custom step temp press ke pe etotal vol pxx pyy pzz pxy pxz pyz
thermo_modify   flush yes format float %10.6g
dump            dump_all all custom 100 traj.lammps id type element x y z
dump_modify     dump_all format float %12.8f append yes element Pt O H
restart         10000 lmp.restart lmp2.restart

# == NVT PRODUCTION ==
reset_timestep  0
velocity        free create ${temp} ${seed} dist gaussian
velocity        fixed create ${temp} ${seed} dist gaussian
fix                 fix_nve free nve
fix                 fix_temp free temp/csvr ${temp} ${temp} 0.1 ${seed}
fix                 fix_wall all wall/reflect zhi ${wall}
run                 ${nsteps}
unfix           fix_nve
unfix           fix_temp
unfix           fix_wall
write_data      final.lammpsdata
write_restart   final.restart
